A := [2; 2; 3]
B := [2; -1; 3]
D := [3; 1; 2]
A_1 := [2; 3; 1]
# 1)
AB := B - A = [0; -3; 0]
AD := D - A = [1; -1; -1]
cross_product := AB×AD = [3; 0; 3]
||cross_product|| = 4.24264
# Вектора линейно независимы т.к. модуль векторного произведения не равен 0 => на этих векторах можно построить параллелограм.
|AB| = 3
||AD|| = 1.73205
# Находим длины сторон параллелограма.
# 2)
O := (B + D)/2 = [2.5; 0; 2.5]
# координата точки пересечения диагоналей
BO := O - B = [0.5; 1; -0.5]
AO := O - A = [0.5; -2; -0.5]
cos_of_angle := AO*BO/(||AO||*||BO||) = -0.57735
angle := acos(cos_of_angle)*180/π = 125.264
# угол и косинус угла между векторами BO и AO
angle_2 := 180 - angle = 54.7356
# смежный угол к углу AOB
# 3)
cross_product := AB×AD = [3; 0; 3]
||cross_product|| = 4.24264
# площадь параллелограма = модулю векторного произведения векторов
# 4)
AA_1 := A_1 - A = [0; 1; -2]
triple_product := |AA_1*(AB×AD)| = 6
# т.к. модуль смешанного произведения не равен 0 => на этих векторах можно построить параллелепипед с объемом = 6
h := triple_product/|cross_product| = 1.41421
# высота = модуль смешанного произведения (объем) деленное на модуль векторного (площадь)
# 5)
λ := |h|/|cross_product| = 0.333333
AH := cross_product*λ = [1; 0; 1]
# вектор AH равняется произведению псевдовектора (полученного при векторном произведении) и коэффицента (полученного при делении высоты на модуль векторного произведения)
# единичный вектор равняется отношению вектора на длину этого самого вектора
H := A - AH = [1; 2; 2]
AH_e := AH/|AH| = [0.707107; 0; 0.707107]
# 6)
h_1*AB + h_2*AD + h_3*AA_1 → [h_2; h_3 - (h_2 + 3*h_1); -(2*h_3) - h_2]
# 7)
projectionAH_AA1 := AH*AA_1/|AA_1| = -0.894427
# проекция вектора AH на AA1
